// SBML level 3 version 2

model biocrnpyler_860325()
  // model units - substance: mole, time: second, volume: litre, area: square_metre, length: metre, extent: mole

  // Compartments:
  compartment default = 1e-6;

  // Species:
  species MGapt in default = 0;
  species DTT in default = 0;
  species MGapt_altered in default = 0;
  species mgapt in default = 0;
  species MGdye in default = 0;

  // Reactions:
  r0: mgapt + MGdye => MGapt; r0_k_forward*mgapt*MGdye;
    r0_k_forward = 0.001;
  r1: MGapt + DTT => MGapt_altered; r1_k_forward*MGapt*DTT;
    r1_k_forward = 1.935e-6;
  r1rev: MGapt_altered => MGapt + DTT; r1rev_k_reverse*MGapt_altered;
    r1rev_k_reverse = 7.74e-6;
  r2: MGapt_altered => mgapt + DTT + MGdye; r2_k_forward*MGapt_altered;
    r2_k_forward = 0.0774;
  r2rev: mgapt + DTT + MGdye => MGapt_altered; r2rev_k_reverse*mgapt*DTT*MGdye;
    r2rev_k_reverse = 0.07740774;
  r3: mgapt => ; r3_k_forward*mgapt;
    r3_k_forward = 0.002;
  r4: DTT => ; r4_k_forward*DTT;
    r4_k_forward = 0.00032;

  // Unit definitions:
  unit square_metre = metre^2;
end
