// SBML level 3 version 2

model biocrnpyler_860325()
  // model units - substance: mole, time: second, volume: litre, area: square_metre, length: metre, extent: mole

  // Compartments:
  compartment default = 1e-6;

  // Species:
  species MGapt in default = 0;
  species DTT in default = 0;
  species MGapt_altered in default = 0;
  species mgapt in default = 0;
  species MGdye in default = 0;

  // Parameters:
  k_forward = 0.001;
  k_forward1 = 1.935e-6;
  k_reverse = 7.74e-6;
  k_forward3 = 0.0774;
  k_reverse4 = 0.07740774;
  k_forward5 = 0.002;
  k_forward6 = 0.00032;

  // Reactions:
  r0: mgapt + MGdye => MGapt; k_forward*mgapt*MGdye;
  r1: MGapt + DTT => MGapt_altered; k_forward1*MGapt*DTT;
  r1rev: MGapt_altered => MGapt + DTT; k_reverse*MGapt_altered;
  r2: MGapt_altered => mgapt + DTT + MGdye; k_forward3*MGapt_altered;
  r2rev: mgapt + DTT + MGdye => MGapt_altered; k_reverse4*mgapt*DTT*MGdye;
  r3: mgapt => ; k_forward5*mgapt;
  r4: DTT => ; k_forward6*DTT;

  // Unit definitions:
  unit square_metre = metre^2;
end
